New "Capacitor.mdv201_da_8_153_abc74433-1" bus1=74433 kv=13.198602 kvar=[ 600] conn=wye
New "CapControl.mdv201_da_8_153_abc74433-1" capacitor=MDV201_DA_8_153_ABC74433-1 element=Line.MDV201_DA_8_154_ABC74439 terminal=1
